Shark Hawk Concept
0.0
0 0 0.0
1.0000 1.0000 1.0000
0.2652 0.0000 -0.0174
0.01
SURFACE
Main Wing
10 1.0
YDUPLICATE
0.0
ANGLE
1.5000
SECTION
0.0000 0.0000 0.0000 0.3000 0.0000 5 -2.0
NACA
2412
SECTION
0.0000 0.5000 0.0000 0.3000 0.0000 5 -2.0
NACA
2412
CONTROL
Aileron 1.0 0.7500 0.0 0.0 0.0 -1
SECTION
0.0000 1.0000 0.0262 0.1500 0.0000 0 0.0
NACA
0012
CONTROL
Aileron 1.0 0.7500 0.0 0.0 0.0 1
SURFACE
H-Tail
10 1.0
YDUPLICATE
0.0
ANGLE
-1.0000
SECTION
1.0000 0.0000 0.0000 0.2000 0.0000 5 -2.0
NACA
0012
CONTROL
Elevator 1.0 0.7000 0.0 0.0 0.0 1
SECTION
1.0500 0.3000 0.0000 0.1500 0.0000 0 0.0
NACA
0012
CONTROL
Elevator 1.0 0.7000 0.0 0.0 0.0 1
SURFACE
Vertical Tail
10 1.0
ANGLE
0.0000
SECTION
0.8000 0.0000 0.0000 0.2500 0.0000 5 -2.0
NACA
0012
CONTROL
Rudder 1.0 0.7000 0.0 0.0 0.0 1
SECTION
0.8000 0.0000 0.3000 0.2000 0.0000 0 0.0
NACA
0012
CONTROL
Rudder 1.0 0.7000 0.0 0.0 0.0 1
