Lunit = 1.0 m
Munit = 1.0 kg
Tunit = 1.0 s

g   = 9.81
rho = 1.225

#  mass    x     y     z    Ixx   Iyy   Izz    Ixy   Iyz   Izx
   1.0000   0.5000   0.0000   0.0000   0.001   0.001   0.001   0.0   0.0   0.0   ! Fuselage
   0.2000   -0.1000   0.0000   0.0000   0.001   0.001   0.001   0.0   0.0   0.0   ! Motor
   0.5000   0.3000   0.0000   0.0000   0.001   0.001   0.001   0.0   0.0   0.0   ! Battery
